//define = [
//  {'TLEM_VERSION':'"2.0"'},
//  {'TLEM_VERSION':'"1.1"'},
//]
//ignore_errors = ['FileReader.FileName']

//#path AMMR_PATH "C:\Users\mel\Documents\AMMRs\ammr-beta"


// Test related setup.
#ifndef TLEM_VERSION
#define TLEM_VERSION "2.0"
#endif

#include "libdef.any"


#path TEMP_PATH "Output"
#ifdef TEST_NAME
#define MOCAP_OUTPUT_FILENAME_PREFIX TEST_NAME + "_"
#else
#define MOCAP_OUTPUT_FILENAME_PREFIX "GUI_"
#endif
#path MOCAP_C3D_DATA_PATH "../Examples/Plug-in-gait"

// Run Analysis with a reduced number of time steps
// to make test go faster.
#define N_STEP_PARAM_OPT 10
#define N_STEP_KINEMATICS 197
#define N_STEP 100

#include "../Examples/Plug-in-gait/Main.any"

Main =
{
  AnyOperationSequence  RunTest =
  {
    AnyOperation& ParameterId =  Main.RunParameterIdentification;
    AnyOperation& RunAnalysis = Main.RunAnalysis;
  };


};
